Simulations: Version=201
  Simulation Clay Fellow
    Clock: Start=1995-01-01; End=1995-06-01
    Summary
    Weather: FileName=/folder/weather/w_39.43867523323825_-87.00386100148984.met
    SoilArbitrator
    MicroClimate: a_interception=9; b_interception=9; c_interception=9; d_interception=9; SoilHeatFluxFraction=0.5; MinimumHeightDiffForNewLayer=9; NightInterceptionFraction=0.7; ReferenceHeight=3
    Zone Field: Area=1; Slope=0; AspectAngle=0; Altitude=50
      Report: EventNames=[Clock].EndOfDay
        VariableNames:
          [Clock].Today
          [Weather].Rain
          sum([Soil].SoilWater.ESW)
          [Soil].SoilWater.Es
          [Soil].SoilWater.Runoff
          [Soil].SoilWater.Drainage
          sum([Soil].NO3.kgha)
          sum([Soil].Nutrient.MineralisedN)
          [SurfaceOrganicMatter].Wt
          [SurfaceOrganicMatter].Cover
      SurfaceOrganicMatter: InitialResidueName=wheat_stubble; InitialResidueType=wheat; InitialResidueMass=1000; InitialStandingFraction=0; InitialCPR=0; InitialCNR=99
      Soil Heavy Clay: ASCOrder=Vertosol; ASCSubOrder=Black; SoilType=Clay; Site=Kaimkillenbun; NearestTown=Kaimkillenbun, Q 4406; Region=Darling Downs and Granite Belt; State=Queensland; Country=Australia; NaturalVegetation=Open woodland with mountain coolibah; ApsoilNumber=50; Latitude=-27.066; Longitude=151.413; LocationAccuracy=+/- 20m; DataSource=CSIRO Sustainable Ecosystems, Toowoomba; Comments=oc and ph estimated
        Physical: Rocks=[0, 0, 0, 0, 0, 0, 0]
          Thickness  ParticleSizeSand  ParticleSizeSilt  ParticleSizeClay  BD    AirDry  LL15   DUL    SAT
          20         5                 77                18                1.53  0.069   0.138  0.289  0.42
          119        4                 69                27                1.63  0.0835  0.167  0.309  0.383906
          200        3                 83                14                1.56  0.0435  0.087  0.245  0.41
          Rocks, ParticleSizeSand, ParticleSizeSilt, ParticleSizeClay source: Calculated
        WaterBalance SoilWater: SummerDate=1-Nov; SummerU=6; SummerCona=3.5; WinterDate=1-Apr; WinterU=4; WinterCona=2.5; DiffusConst=40; DiffusSlope=16; Salb=0.12; CN2Bare=73; CNRed=20; CNCov=0.8; PSIDul=-100; Thickness=[20, 119, 200]; SWCON=[0.3, 0.3, 0.3, 0.3, 0.3, 0.3, 0.3]
        Water: Thickness=[20, 119, 200]; InitialValues=[0.138, 0.167, 0.087]; FilledFromTop=true
        Organic: FOMCNRatio=40; CarbonUnits=Total; FBiom=[0.04, 0.02, 0.02, 0.02, 0.01, 0.01, 0.01]; FInert=[0.4, 0.6, 0.8, 1, 1, 1, 1]; FOM=[347.129, 270.344, 163.972, 99.454, 60.322, 36.587, 22.191]
          Thickness  Carbon  SoilCNRatio
          20         2.5     12
          119        0.4     12
          200        0.2     12
        Chemical: PHUnits=Water
          Thickness  PH  CEC
          150        8   10.4915
          150        8   10.4915
          300        8   10.5095
          300        8   10.2485
          300        8   9.5735
          300        8   8.9345
          300        8   8.795
          CEC source: Calculated
        Nutrient
        Solute NO3: Thickness=[20, 119, 200]; InitialValues=[20]; InitialValuesUnits=kg/ha; WaterTableConcentration=0; D0=0; DepthConstant=0; MaxDepthSoluteAccessible=0; RunoffEffectivenessAtMovingSolute=0; MaxEffectiveRunoff=0
        Solute NH4: Thickness=[20, 119, 200]; InitialValues=[200]; InitialValuesUnits=kg/ha; WaterTableConcentration=0; D0=0; DepthConstant=0; MaxDepthSoluteAccessible=0; RunoffEffectivenessAtMovingSolute=0; MaxEffectiveRunoff=0
        Solute Urea: Thickness=[20, 119, 200]; InitialValues=[200]; InitialValuesUnits=ppm; WaterTableConcentration=0; D0=0; DepthConstant=0; MaxDepthSoluteAccessible=0; RunoffEffectivenessAtMovingSolute=0; MaxEffectiveRunoff=0
        SoilTemperature Temperature
  DataStore
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